#---------------------------------------------------------------------#
#---------- Simulation of {ELEMENT1_NUMBER}{ELEMENT2_NUMBER} in triclinic (P1) ----#
#-------------------- Writer:: Your Name ----------------------------#
#-------------------- Temperature: 300 Kelvin -----------------------#
#---------------------------------------------------------------------#

#---------------------Define initial value
variable              Temperature equal 300     # 300 K
variable              Pressure    equal 1.01325 # 1.01325 bar
variable              Timestep    equal 0.001   # 0.001 ps=1 fs::Ref[1]

#-----------------------------------------------------------#
#----------------------Initialization-----------------------#
#-----------------------------------------------------------#

#----------------------Define units, atom_style, dimension and boundary
echo                   both
units                  metal
dimension              3
boundary               p p p
atom_style             full

#----------------------Define neighbor Algorithm and neighbor list
neighbor               2.0 bin
neigh_modify           delay 0 every 1 check yes
read_data              {DATA_FILE}

#----------------------Define groups for simulation
group                  {ELEMENT1}  type 1
group                  {ELEMENT2}  type 2

#-----------------------------------------------------------------------------------#
#----------------------Setup interaction potentials between ions--------------------#
#-----------------------------------------------------------------------------------#

pair_style             meam
pair_coeff             * * {LIBRARY_FILE} {ELEMENT1} {ELEMENT2} {CROSS_POTENTIAL_FILE} {ELEMENT1} {ELEMENT2}

#--------------------------------------------------------------------------------------#
#----Setting velocity, thermostep, thermo_style, timestep and other necessary setup----#
#--------------------------------------------------------------------------------------#
#---------------------Define thermo_style order to chose thermodynamic variable for save
thermo_style          custom   step  temp   press   ke  pe  etotal

#---------------------Define simulation time step
timestep              ${Timestep} # time_step=0.001ps=1fs :Ref[1]

#-----------------------------------------#
#-------- Minimization protocols ---------#
#-----------------------------------------#
dump                   Min all atom 100 {ELEMENT1}{ELEMENT2}_min.atom
min_style              cg
thermo 50  # Print every step during minimization
minimize               1e-25 1e-25 10000 10000
undump                 Min
reset_timestep	       0

#-------------------------------------------------------------#
#---- Dynamic stage: Calculation enthalpy in NVT ensemble ----#
#-------------------------------------------------------------#

#---------------------Set canonical ensemble(NVT) in T=${Temperature}
fix                   NVT_Equilibrium_Final all nvt temp ${Temperature} ${Temperature} 0.1

#---------------------Save the trajectories with dump command in Equilibrium stage
dump                  Equilibrium.NVT.Final all atom 100 Equilibrium.NVT.Final.atom

#-----------------------------------------------------#
#-------------- Calculation enthalpy -----------------#
#-----------------------------------------------------#

#---------------------Calculation potentials energy per atoms
compute               Potentials_energy_per_atoms_vector all pe/atom
variable              PD atom c_Potentials_energy_per_atoms_vector            # PD= Potentials_energy_per_atoms_vector for dump
compute               Potentials_energy all reduce sum c_Potentials_energy_per_atoms_vector
variable              N equal "count(all)"
variable              N1 equal count({ELEMENT1})
variable              N2 equal count({ELEMENT2})
variable              n equal {N_ELEMENT1}        # {ELEMENT1}_n{ELEMENT2}_m
variable              m equal {M_ELEMENT2}
compute               E{ELEMENT1} {ELEMENT1} pe/atom
compute               E{ELEMENT2} {ELEMENT2} pe/atom
compute               E1 {ELEMENT1} reduce sum c_E{ELEMENT1}
compute               E2 {ELEMENT2} reduce sum c_E{ELEMENT2}
variable              Potentials_energy_per_atoms_scaller equal "c_Potentials_energy/v_N"
variable              Totenergy equal etotal                               #Kinetic+Potentials

#---------------------Calculation Temperature
compute               TEMPERATURE all   temp
variable              TEMPERATURE equal "c_TEMPERATURE"

#---------------------Calculation formation Energy and heat of formation
variable              lengtha equal "lx/{DIMENSION}"
variable              lengthc equal "lz/{DIMENSION}"
variable              Ec{ELEMENT1} equal {COHESIVE_E1}  	 #Cohesive energy of {ELEMENT1}
variable              Ec{ELEMENT2} equal {COHESIVE_E2}           #Cohesive energy of {ELEMENT2}
variable              Etot equal v_Totenergy/v_N
variable              formation_energy equal -(v_Etot-v_n*v_Ec{ELEMENT1}-v_m*v_Ec{ELEMENT2})/({COEF}*(v_n+v_m))
variable              heat_formation equal (v_Etot*v_N-v_N1*c_E1-v_N2*c_E2)/(v_N)
thermo_style          custom step temp press etotal v_Etot c_E1 c_E2 v_formation_energy v_heat_formation v_lengtha v_lengthc
thermo 500  # Print every step during dynamics

#---------------------Dynamic run
run                   10000 # 1 ps

#--------------------Print flag order to show simulation is successful
print                "SIMULATION IS SUCCESSFUL DONE"
